<?xml version="1.0" encoding="UTF-8"?>

<neuroml xmlns="http://www.neuroml.org/schema/neuroml2"
         xmlns:xsi="http://www.w3.org/2001/XMLSchema-instance"
         xsi:schemaLocation="http://www.neuroml.org/schema/neuroml2 ../Schemas/NeuroML2/NeuroML_v2beta4.xsd"
         id=" NML_EdenTestNetwork1">

    <!-- Example of an isolated, passive compartment; minimal sanity check -->

	<ionChannelHH id="passiveChan" conductance="10pS">
		<notes>Leak conductance</notes>
	</ionChannelHH>

    <biophysicalProperties id="bioPhys_Passive">
        <membraneProperties>
            <channelDensity id="leak" ionChannel="passiveChan" condDensity="3.0 S_per_m2" erev="-0mV" ion="non_specific"/>
            <!-- <spikeThresh value="-64.5mV"/> -->
            <specificCapacitance value="1.0 uF_per_cm2"/>
            <initMembPotential value="-65mV" />
        </membraneProperties>
        <intracellularProperties>
            <resistivity value="1 kohm_cm"/>
        </intracellularProperties>
    </biophysicalProperties>

	<cell id="Cable_Unified"><!-- biophysicalProperties="bioPhys_Passive" -->
        <morphology id="Morph_Unified">
            <segment id ="0" name="Axon_0">
                <proximal x="0" y="0" z="0" diameter="1"/>
                <distal x="10" y="0" z="0" diameter="1"/>
            </segment>
            <segment id ="1" name="Axon_1">
                <parent segment="0"/>
                <distal x="10" y="7" z="0" diameter=".5"/>
            </segment>
            <segment id ="2" name="Axon_2">
                <parent segment="1"/>
                <distal x="10" y="7" z="4" diameter=".2"/>
            </segment>
            <segmentGroup id="axon" neuroLexId="sao864921383">
                <!-- <property tag="numberInternalDivisions" value="1"/> -->
                <member segment="0"/>
                <member segment="1"/>
                <member segment="2"/>
            </segmentGroup>
            <!-- <segmentGroup id="all">
                <member segment="0"/>
                <member segment="1"/>
                <member segment="2"/>
            </segmentGroup> -->

        </morphology>
        <biophysicalProperties id="bioPhys_Passive">
            <membraneProperties>
                <channelDensity id="leak" ionChannel="passiveChan" condDensity="3.0 S_per_m2" erev="-0mV" ion="non_specific"/>
                <!-- <spikeThresh value="-64.5mV"/> -->
                <specificCapacitance value="1.0 uF_per_cm2"/>
                <initMembPotential value="-65mV" />
            </membraneProperties>
            <intracellularProperties>
                <resistivity value="10 kohm_cm"/>
            </intracellularProperties>
        </biophysicalProperties>
    </cell>
    <cell id="Cable_Subdivided" ><!-- biophysicalProperties="bioPhys_Passive" -->
        <morphology id="Morph_Subdivided">
            <segment id ="0" name="Axon_0">
                <proximal x="0" y="0" z="0" diameter="1"/>
                <distal x="1000" y="0" z="0" diameter="1"/>
            </segment>
            <segmentGroup id="axon" neuroLexId="sao864921383">
                <property tag="numberInternalDivisions" value="5"/>
                <member segment="0"/>
            </segmentGroup>
        </morphology>

        <biophysicalProperties id="bioPhys_Passive">
            <membraneProperties>
                <channelDensity id="leak" ionChannel="passiveChan" condDensity="0.0 S_per_m2" erev="-0mV" ion="non_specific"/>
                <!-- <spikeThresh value="-64.5mV"/> -->
                <specificCapacitance value="1.0 uF_per_cm2"/>
                <initMembPotential value="-65mV" />
            </membraneProperties>
            <intracellularProperties>
                <resistivity value="1 kohm_cm"/>
            </intracellularProperties>
        </biophysicalProperties>
    </cell>

    <cell id="Cable_Subdivided_Explicitly" ><!-- biophysicalProperties="bioPhys_Passive" -->
        <morphology id="Morph_Subdivided_Explicitly">
            <segment id ="0" name="Axon_0">
                <proximal x="0" y="0" z="0" diameter="1"/>
                <distal x="200" y="0" z="0" diameter="1"/>
            </segment>
            <segment id ="1" name="Axon_1">
                <parent segment="0"/>
                <distal x="400" y="0" z="0" diameter="1"/>
            </segment>
            <segment id ="2" name="Axon_2">
                <parent segment="1"/>
                <distal x="600" y="0" z="0" diameter="1"/>
            </segment>
            <segment id ="3" name="Axon_3">
                <parent segment="2"/>
                <distal x="800" y="0" z="0" diameter="1"/>
            </segment>
            <segment id ="4" name="Axon_4">
                <parent segment="3"/>
                <distal x="1000" y="0" z="0" diameter="1"/>
            </segment>
            <segmentGroup id="axon">
                <member segment="0"/>
                <member segment="1"/>
                <member segment="2"/>
                <member segment="3"/>
                <member segment="4"/>
            </segmentGroup>
        </morphology>

        <biophysicalProperties id="bioPhys_Passive">
            <membraneProperties>
                <channelDensity id="leak" ionChannel="passiveChan" condDensity="0.0 S_per_m2" erev="-0mV" ion="non_specific"/>
                <!-- <spikeThresh value="-64.5mV"/> -->
                <specificCapacitance value="1.0 uF_per_cm2"/>
                <initMembPotential value="-65mV" />
            </membraneProperties>
            <intracellularProperties>
                <resistivity value="1 kohm_cm"/>
            </intracellularProperties>
        </biophysicalProperties>
    </cell>

    <cell id="Cable_Subdivided_Effectively" ><!-- biophysicalProperties="bioPhys_Passive" -->
        <morphology id="Morph_Subdivided_Effectively">
            <segment id ="0" name="Axon_0">
                <proximal x="0" y="0" z="0" diameter="1"/>
                <distal x="200" y="0" z="0" diameter="1"/>
            </segment>
            <segment id ="1" name="Axon_1">
                <parent segment="0"/>
                <distal x="400" y="0" z="0" diameter="1"/>
            </segment>
            <segment id ="2" name="Axon_2">
                <parent segment="1"/>
                <distal x="600" y="0" z="0" diameter="1"/>
            </segment>
            <segment id ="3" name="Axon_3">
                <parent segment="2"/>
                <distal x="800" y="0" z="0" diameter="1"/>
            </segment>
            <segment id ="4" name="Axon_4">
                <parent segment="3"/>
                <distal x="1000" y="0" z="0" diameter="1"/>
            </segment>
            <segmentGroup id="axon" neuroLexId="sao864921383">
                <property tag="numberInternalDivisions" value="5"/>
                <member segment="0"/>
                <member segment="1"/>
                <member segment="2"/>
                <member segment="3"/>
                <member segment="4"/>
            </segmentGroup>
        </morphology>

        <biophysicalProperties id="bioPhys_Passive">
            <membraneProperties>
                <channelDensity id="leak" ionChannel="passiveChan" condDensity="0.0 S_per_m2" erev="-0mV" ion="non_specific"/>
                <!-- <spikeThresh value="-64.5mV"/> -->
                <specificCapacitance value="1.0 uF_per_cm2"/>
                <initMembPotential value="-65mV" />
            </membraneProperties>
            <intracellularProperties>
                <resistivity value="1 kohm_cm"/>
            </intracellularProperties>
        </biophysicalProperties>
    </cell>

    <pulseGenerator id="pulseGen1" delay="10ms" duration="8ms" amplitude="0.2nA"/>
    <pulseGenerator id="pulseGen2" delay="60ms" duration="8ms" amplitude="0.2nA"/>

    <network id="EdenTest_CableDiscretisation">

        <population id="Pop_Unified" component="Cable_Unified" size="1" />
        <population id="Pop_Subdivided" component="Cable_Subdivided" size="1" />
        <population id="Pop_Subdivided_Explicitly" component="Cable_Subdivided_Explicitly" size="1" />
        <population id="Pop_Subdivided_Effectively" component="Cable_Subdivided_Effectively" size="1" />

        <inputList id="stimInput_Unified_1" component="pulseGen1" population="Pop_Unified">
            <input id="0" target="../Pop_Unified/0/Cable_Unified" segmentId="0" fractionAlong="0.5" destination="synapses"/>
        </inputList>
        <inputList id="stimInput_Unified_2" component="pulseGen2" population="Pop_Unified">
            <input id="0" target="../Pop_Unified/0/Cable_Unified" segmentId="2" fractionAlong="0.5" destination="synapses"/>
        </inputList>

        <inputList id="stimInput_Subdivided_1" component="pulseGen1" population="Pop_Subdivided">
            <input id="0" target="../Pop_Subdivided/0/Cable_Subdivided" segmentId="0" fractionAlong="0.10" destination="synapses"/>
        </inputList>
        <inputList id="stimInput_Subdivided_2" component="pulseGen2" population="Pop_Subdivided">
            <input id="0" target="../Pop_Subdivided/0/Cable_Subdivided" segmentId="0" fractionAlong="0.70" destination="synapses"/>
        </inputList>

        <inputList id="stimInput_Subdivided_Explicitly_1" component="pulseGen1" population="Pop_Subdivided_Explicitly">
            <input id="0" target="../Pop_Subdivided_Explicitly/0/Cable_Subdivided_Explicitly" segmentId="0" fractionAlong="0.5" destination="synapses"/>
        </inputList>
        <inputList id="stimInput_Subdivided_Explicitly_2" component="pulseGen2" population="Pop_Subdivided_Explicitly">
            <input id="0" target="../Pop_Subdivided_Explicitly/0/Cable_Subdivided_Explicitly" segmentId="3" fractionAlong="0.5" destination="synapses"/>
        </inputList>

        <inputList id="stimInput_Subdivided_Effectively_1" component="pulseGen1" population="Pop_Subdivided_Effectively">
            <input id="0" target="../Pop_Subdivided_Effectively/0/Cable_Subdivided_Effectively" segmentId="0" fractionAlong="0.5" destination="synapses"/>
        </inputList>
        <inputList id="stimInput_Subdivided_Effectively_2" component="pulseGen2" population="Pop_Subdivided_Effectively">
            <input id="0" target="../Pop_Subdivided_Effectively/0/Cable_Subdivided_Effectively" segmentId="3" fractionAlong="0.5" destination="synapses"/>
        </inputList>

        <!-- TODO intermediate cases, 3 segments -> 5 compartments, partial coverage of cables over the cell, ... -->
    </network>
</neuroml>
