<?xml version="1.0" encoding="UTF-8"?>

<neuroml xmlns="http://www.neuroml.org/schema/neuroml2"
         xmlns:xsi="http://www.w3.org/2001/XMLSchema-instance"
         xsi:schemaLocation="http://www.neuroml.org/schema/neuroml2 ../Schemas/NeuroML2/NeuroML_v2beta4.xsd"
         id=" NML_EdenTestNetwork">

    <!--
		Example of core NeuroML injected current inputs.
	-->

	<ionChannelHH id="passiveChan" conductance="10pS">
		<notes>Leak conductance</notes>
	</ionChannelHH>

	<cell id="PassiveCell">

        <notes></notes>

        <morphology>

			<segment id="0" name="soma">
                <proximal x="0" y="0" z="0" diameter="17.841242"/> <!--Gives a convenient surface area of 1000.0 ?m�-->
                <distal x="0" y="0" z="0" diameter="17.841242"/>
            </segment>

        </morphology>

        <biophysicalProperties id="bioph_PassiveCompartment">

            <membraneProperties>

                <channelDensity id="leak" ionChannel="passiveChan" condDensity="3.0 S_per_m2" erev="-54.3mV" ion="non_specific"/>

                <spikeThresh value="-0.0mV"/>
                <specificCapacitance value="1.0 uF_per_cm2"/>
				<initMembPotential value="-65mV" />

            </membraneProperties>

            <intracellularProperties>
                <resistivity value="0.03 kohm_cm"/>
            </intracellularProperties>

        </biophysicalProperties>
    </cell>

	<izhikevichCell id="izMixed" v0 = "-70mV" thresh = "30mV" a ="0.02" b = "0.2" c = "-55" d = "0"/>

	<!-- Synaptic components for the firing synpase inputs -->
	<expOneSynapse id="Syn_expOneSynapse" gbase="10nS" erev="0V" tauDecay="0.5ms"/>
	<expTwoSynapse id="Syn_expTwoSynapse" gbase="05nS" erev="0V" tauDecay="1.0ms" tauRise="0.5ms"/>

	<pulseGenerator     id="Inp_pulseGenerator"     delay="10ms" duration="20ms" amplitude="0.2nA"/>
	<pulseGeneratorDL   id="Inp_pulseGeneratorDL"   delay="10ms" duration="20ms" amplitude="14"/>
	<sineGenerator      id="Inp_sineGenerator"      delay="20ms" duration="50ms" amplitude="1.0nA" phase="0" period="5ms"/>
	<sineGeneratorDL    id="Inp_sineGeneratorDL" phase="1" delay="20ms" duration="50ms" amplitude="40" period="10ms"/>
	<rampGenerator      id="Inp_rampGenerator"      delay="0ms" duration="200ms" startAmplitude="0.5nA" finishAmplitude="4nA" baselineAmplitude="0nA"/>
	<rampGeneratorDL    id="Inp_rampGeneratorDL"    delay="30ms" duration="170ms" startAmplitude="-32" finishAmplitude="50" baselineAmplitude="-32"/>
	<!-- <voltageClamp       id="Inp_voltageClamp"       delay="50ms" duration="50ms" targetVoltage="0mV" seriesResistance="1e1ohm"/> -->
	<voltageClamp       id="Inp_voltageClamp"       delay="20ms" duration="50ms" targetVoltage="0mV" simpleSeriesResistance="1e6ohm"/>
	<voltageClampTriple id="Inp_voltageClampTriple" delay="10ms" duration="30ms" active = "1" conditioningVoltage="-63.77mV" testingVoltage="0mV"  returnVoltage="-40.77mV"  simpleSeriesResistance="1e8ohm"/>
	<timedSynapticInput id="Inp_timedSynapticInput" synapse="Syn_expOneSynapse" spikeTarget="./Syn_expOneSynapse">
        <spike id="0" time="0.003 ms"/>
        <spike id="1" time="0.0102 ms"/>
        <spike id="2" time="2 ms"/>
        <spike id="3" time="3 ms"/>
        <spike id="4" time="10 ms"/>
        <spike id="5" time="20 ms"/>
        <spike id="6" time="35 ms"/>
        <spike id="7" time="40 ms"/>
        <spike id="8" time="54.5 ms"/>
        <spike id="9" time="54.6 ms"/>
        <spike id="10" time="54.7 ms"/>
        <spike id="11" time="54.8 ms"/>
        <spike id="12" time="54.9 ms"/>
        <spike id="13" time="55 ms"/>
        <spike id="14" time="55.1 ms"/>
        <spike id="15" time="55.2 ms"/>
    </timedSynapticInput>
	<poissonFiringSynapse id="Inp_poissonFiringSynapse" averageRate="50 Hz" synapse="Syn_expOneSynapse" spikeTarget="./Syn_expOneSynapse"/>
	<transientPoissonFiringSynapse id="Inp_transientPoissonFiringSynapse" delay="5ms" duration="40ms" averageRate="50 Hz" synapse="Syn_expTwoSynapse" spikeTarget="./Syn_expTwoSynapse"/>

	<!-- TODO roundoff fun may lead to a dt long uncertainty of the events happening.
	One way to live with it is to accept this much error + epsilon, another is to place every event here away from multiples of dt.  -->
	<spikeArray id="Inp_spikeArray">
		<spike id="0" time="10 ms"/>
		<spike id="1" time="20 ms"/>
		<spike id="2" time="35 ms"/>
		<spike id="3" time="50 ms"/>
		<spike id="4" time="70 ms"/>
    </spikeArray>
	<spikeGenerator           id="Inp_spikeGenerator"           period="6 ms"/>
	<spikeGeneratorRandom     id="Inp_spikeGeneratorRandom"     minISI="18 ms" maxISI="22 ms"/>
    <spikeGeneratorPoisson    id="Inp_spikeGeneratorPoisson"    averageRate="50 Hz"/>
    <spikeGeneratorRefPoisson id="Inp_spikeGeneratorRefPoisson" averageRate="50 Hz" minimumISI="10 ms"/>
    <SpikeSourcePoisson       id="Inp_SpikeSourcePoisson"       start="0ms" duration="50s" rate="50Hz"/>

	<!-- LATER compound inputs -->

    <network id="EdenTestNetwork">

		<population id="InputDemos" component="PassiveCell" type="populationList" >
			<instance id= "0"><location x="0" y="0" z="0"/></instance>
			<instance id= "1"><location x="0" y="0" z="0"/></instance>
			<instance id= "2"><location x="0" y="0" z="0"/></instance>
			<instance id= "3"><location x="0" y="0" z="0"/></instance>
			<instance id= "4"><location x="0" y="0" z="0"/></instance>
			<instance id= "5"><location x="0" y="0" z="0"/></instance>
			<instance id= "6"><location x="0" y="0" z="0"/></instance>
			<instance id= "7"><location x="0" y="0" z="0"/></instance>
			<instance id= "8"><location x="0" y="0" z="0"/></instance>
			<instance id= "9"><location x="0" y="0" z="0"/></instance>
			<instance id="10"><location x="0" y="0" z="0"/></instance>
			<instance id="11"><location x="0" y="0" z="0"/></instance>
			<instance id="12"><location x="0" y="0" z="0"/></instance>
			<instance id="13"><location x="0" y="0" z="0"/></instance>
			<instance id="14"><location x="0" y="0" z="0"/></instance>
			<instance id="15"><location x="0" y="0" z="0"/></instance>
			<instance id="16"><location x="0" y="0" z="0"/></instance>
        </population>

		<population id="InputDemosDL" component="izMixed" size="4" />

		<population id="Input_spikeArray"               component="Inp_spikeArray"               size="1" />
		<population id="Input_spikeGenerator"           component="Inp_spikeGenerator"           size="1" />
		<!-- NeuroML/NEURON hangs when random spike sources are involved, TODO check a newer release -->
		<!-- <population id="Input_spikeGeneratorRandom"     component="Inp_spikeGeneratorRandom"     size="1" /> -->
		<!-- <population id="Input_spikeGeneratorPoisson"    component="Inp_spikeGeneratorPoisson"    size="1" /> -->
		<!-- <population id="Input_spikeGeneratorRefPoisson" component="Inp_spikeGeneratorRefPoisson" size="1" /> -->
		<!-- <population id="Input_SpikeSourcePoisson"       component="Inp_SpikeSourcePoisson"       size="1" /> -->

		<!-- LATER find out how to make this example play well with jLEMS too -->

		<inputList id="inputDemo01" population="InputDemos" component="Inp_pulseGenerator">
			<input id="0" target="InputDemos/01" segmentId="0" destination="synapses"/>
		</inputList>

		<inputList id="inputDemo02" population="InputDemos" component="Inp_sineGenerator">
			<input id="0" target="InputDemos/02" segmentId="0" destination="synapses"/>
		</inputList>

		<inputList id="inputDemo03" population="InputDemos" component="Inp_rampGenerator">
			<input id="0" target="InputDemos/03" segmentId="0" destination="synapses"/>
		</inputList>

		<inputList id="inputDemo04" population="InputDemos" component="Inp_voltageClamp">
			<input id="0" target="InputDemos/04" segmentId="0" destination="synapses"/>
		</inputList>

		<inputList id="inputDemo05" population="InputDemos" component="Inp_voltageClampTriple">
			<input id="0" target="InputDemos/05" segmentId="0" destination="synapses"/>
		</inputList>

		<inputList id="inputDemo06" population="InputDemos" component="Inp_timedSynapticInput">
			<input id="0" target="InputDemos/06" segmentId="0" destination="synapses"/>
		</inputList>
		<!-- NeuroML/NEURON ignores a second input of same type that's attached to the same point
		Should have twice the input current, but the current is the same as with 1 input instance -->
		<!-- <inputList id="inputDemo06_Encore" population="InputDemos" component="Inp_timedSynapticInput">
			<input id="0" target="InputDemos/06" segmentId="0" destination="synapses"/>
		</inputList> -->

		<!-- NeuroML/NEURON hangs when random firing synapses are involved, TODO check a newer release -->
		<!-- <inputList id="inputDemo07" population="InputDemos" component="Inp_poissonFiringSynapse">
			<input id="0" target="InputDemos/07" segmentId="0" destination="synapses"/>
		</inputList> -->
		<!-- <inputList id="inputDemo08" population="InputDemos" component="Inp_transientPoissonFiringSynapse">
			<input id="0" target="InputDemos/08" segmentId="0" destination="synapses"/>
		</inputList> -->
		<inputList id="inputDemo09" population="InputDemos" component="Inp_pulseGenerator">
			<inputW id="0" target="InputDemos/09" segmentId="0" weight=".7" destination="synapses"/>
			<!-- <input id="0" target="InputDemos/09" segmentId="0" destination="synapses"/> -->

		</inputList>

		<projection id="projChem11" presynapticPopulation="Input_spikeArray" postsynapticPopulation="InputDemos" synapse="Syn_expOneSynapse">
			<connection id="0" preCellId="/0" postCellId="/11" preSegmentId="0" postSegmentId="0"/>
		</projection>
		<projection id="projChem12" presynapticPopulation="Input_spikeGenerator" postsynapticPopulation="InputDemos" synapse="Syn_expOneSynapse">
			<connection id="0" preCellId="/0" postCellId="/12" preSegmentId="0" postSegmentId="0"/>
		</projection>
		<!-- <projection id="projChem13" presynapticPopulation="Input_spikeGeneratorRandom" postsynapticPopulation="InputDemos" synapse="Syn_expOneSynapse">
			<connection id="0" preCellId="/0" postCellId="/13" preSegmentId="0" postSegmentId="0"/>
		</projection>
		<projection id="projChem14" presynapticPopulation="Input_spikeGeneratorPoisson" postsynapticPopulation="InputDemos" synapse="Syn_expOneSynapse">
			<connection id="0" preCellId="/0" postCellId="/14" preSegmentId="0" postSegmentId="0"/>
		</projection>
		<projection id="projChem15" presynapticPopulation="Input_spikeGeneratorRefPoisson" postsynapticPopulation="InputDemos" synapse="Syn_expOneSynapse">
			<connection id="0" preCellId="/0" postCellId="/15" preSegmentId="0" postSegmentId="0"/>
		</projection>
		<projection id="projChem16" presynapticPopulation="Inp_SpikeSourcePoisson" postsynapticPopulation="InputDemos" synapse="Syn_expOneSynapse">
			<connection id="0" preCellId="/0" postCellId="/16" preSegmentId="0" postSegmentId="0"/>
		</projection>
		-->
		<inputList id="inputDemoDL01" population="InputDemosDL" component="Inp_pulseGeneratorDL">
			<input id="0" target="InputDemosDL/01" segmentId="0" destination="synapses"/>
		</inputList>

		<inputList id="inputDemoDL02" population="InputDemosDL" component="Inp_sineGeneratorDL">
			<input id="0" target="InputDemosDL/02" segmentId="0" destination="synapses"/>
		</inputList>

		<inputList id="inputDemoDL03" population="InputDemosDL" component="Inp_rampGeneratorDL">
			<input id="0" target="InputDemosDL/03" segmentId="0" destination="synapses"/>
		</inputList>

    </network>

</neuroml>
