<?xml version="1.0" encoding="UTF-8"?>

<!-- Mimic the effect of input generators with arbitrary time series sourced from URL's -->
<!-- TODO add event IO and test for more combinarions of sources and targets -->
<!-- TODO event sources as sources in syn projections -->
<!-- TODO trigget synapses from pre cells and syn sources simultaneously -->
<!-- LATER half gap junctions from timeseries, somehow -->

<neuroml id=" NML_EdenTestNetwork1">
    <!-- Include core NeuroML2 ComponentType definitions -->
    <Include file="Cells.xml"/>
    <Include file="Networks.xml"/>
    <Include file="Simulation.xml"/>

    <!-- Example of an isolated, passive compartment; minimal sanity check -->
	<ionChannelHH id="passiveChan" conductance="10pS"/>
    <biophysicalProperties id="bioPhys_Passive">
        <membraneProperties>
            <!-- <channelDensity id="leak" ionChannel="passiveChan" condDensity="3.0 S_per_m2" erev="-0mV" ion="non_specific"/>  -->
            <spikeThresh value="-64.5 V"/>
            <specificCapacitance value="1.0 uF_per_cm2"/>
            <initMembPotential value="-65mV" />
        </membraneProperties>
        <intracellularProperties> <resistivity value="1 kohm_cm"/> </intracellularProperties>
    </biophysicalProperties>
    <cell id="PassiveCell" biophysicalProperties="bioPhys_Passive">
        <morphology>
			<segment id="0" name="soma">
                <proximal x="0" y="0" z="0" diameter="17.841242"/> <!-- Gives a convenient surface area of 1000.0 sq.um -->
                <distal x="0" y="0" z="0" diameter="17.841242"/>
            </segment>
        </morphology>
    </cell>

    <ComponentType name="RefCurrentsource" extends="basePointCurrent"
            description="Generates instantaneous current sourced from a VariableReference. Scaled by weight, if set">
        <!-- <Property name="weight" dimension="none" defaultValue="1"/>  weight can be set in i guess? TODO -->
        <!-- <Exposure name="i" dimension="current"/> -->
        <VariableRequirement name="iPointed" dimension="current" />
        <Dynamics>
            <DerivedVariable name="i" dimension="current" exposure="i" value="iPointed"/>
        </Dynamics>
    </ComponentType>
    <ComponentType name="RefHalfGap" extends="basePointCurrent"
        description="Behaves just like a one way gap junction.">
        <Parameter name="conductance" dimension="conductance"/>
        <Exposure name="i" />
        <VariableRequirement name="vpeer" dimension="voltage" />
        <Requirement name="v" dimension="voltage"/>
        <Dynamics>
            <DerivedVariable name="i" exposure="i" dimension="current" value="conductance * (vpeer - v)"/>
        </Dynamics>
    </ComponentType>

    <RefCurrentsource id="inpX"/>
    <RefHalfGap id="gapX" conductance="500 pS"/>

    <expOneSynapse id="syn0" gbase="1nS" erev="0V" tauDecay="0.5ms"/>
    <pulseGenerator id="inp0"  delay="10ms" duration="19.999ms" amplitude="0.05nA"/> <!-- TODO stop the current source on exactly the timestep, to match how it's necessary to be for streaming and such. -->
    <pulseGenerator id="inpCD" delay="20ms" duration="19.999ms" amplitude="0.05nA"/> <!-- TODO stop the current source on exactly the timestep, to match how it's necessary to be for streaming and such. -->

    <spikeArray id="Inp0"><spike id="0" time="00.001 ms"/></spikeArray>
	<spikeArray id="Inp1"><spike id="0" time="17.000 ms"/></spikeArray>
	<spikeArray id="Inp2"><spike id="0" time="25.001 ms"/></spikeArray>
    <spikeArray id="Inp3"><spike id="0" time="35.001 ms"/></spikeArray>
    <spikeArray id="Inp4"><spike id="0" time="36.001 ms"/></spikeArray>

    <!-- Note: the difference between is because of the delayeur introducing a roundoff error EXCEPT when is evenly divisible like 16000 usec
    This is really the delayeur's fault and could be averted by using rounded off delays or even rounded off timestamps? ... TODO -->
    <spikeArray id="InpSD">
        <spike id="0" time="15.999 ms"/>
        <spike id="1" time="27.999 ms"/>
    </spikeArray>
    <spikeArray id="InpSX">
        <spike id="0" time="05.999 ms"/>
        <spike id="1" time="17.999 ms"/>
    </spikeArray>

    <network id="EdenTestNetwork">
        <population id="pop0" component="PassiveCell" size="4" />

        <population id="popS0" component="Inp0" size="1" />
        <population id="popS1" component="Inp1" size="1" />
        <population id="popS2" component="Inp2" size="1" />
        <population id="popS3" component="Inp3" size="1" />
        <population id="popS4" component="Inp4" size="1" />
        <population id="popSD" component="InpSD" size="1" />
        <population id="popSX" component="InpSX" size="1" />
        <population id="popCD" component="PassiveCell" size="2" />

        <inputList id="inli0"  component="inp0"  population="pop0"><inputW id="0" target="pop0[0]" destination="synapses" weight="1"/></inputList>
        <inputList id="inliCD" component="inpCD" population="popCD"><inputW id="0" target="0" destination="synapses" weight="1"/></inputList>
        <inputList id="inliCX" component="inp0"  population="popCD"><inputW id="0" target="1" destination="synapses" weight="1"/></inputList>

        <projection id="projS0" presynapticPopulation="popS0" postsynapticPopulation="pop0" synapse="syn0"> <connection id="0" preCellId="0" postCellId="1"/> </projection>
        <projection id="projS1" presynapticPopulation="popS1" postsynapticPopulation="pop0" synapse="syn0"> <connection id="0" preCellId="0" postCellId="1"/> </projection>
        <projection id="projS2" presynapticPopulation="popS2" postsynapticPopulation="pop0" synapse="syn0"> <connection id="0" preCellId="0" postCellId="1"/> </projection>
        <projection id="projS3" presynapticPopulation="popS3" postsynapticPopulation="pop0" synapse="syn0"> <connection id="0" preCellId="0" postCellId="1"/> </projection>
        <projection id="projS4" presynapticPopulation="popS4" postsynapticPopulation="pop0" synapse="syn0"> <connection id="0" preCellId="0" postCellId="1"/> </projection>

        <projection id="projSD" presynapticPopulation="popSD" postsynapticPopulation="pop0" synapse="syn0"> <connection id="0" preCellId="0" postCellId="3"/> </projection>

        <population id="popX" component="PassiveCell" size="4" />

        <EdenTimeSeriesReader id="DataX"  href="./EdenTest_Extension_CustomIO_TimeSeries.txt" format="ascii_v0" instances="1" >
            <InputColumn id="i" dimension="current" units="pA"/>
        </EdenTimeSeriesReader>
        <EdenTimeSeriesReader id="DataXD"  href="file://timeseriesDelayed.to_sim.pipe" format="ascii_v0" instances="1" >
            <InputColumn id="v" dimension="voltage" units="V"/>
        </EdenTimeSeriesReader>

        <EdenEventSetReader id="SpikeX" href="./EdenTest_Extension_CustomIO_EventSet.txt" format="ascii_v0" instances="1" >
            <Port id="lalala"/>
        </EdenEventSetReader>
        <EdenEventSetReader id="SpikeY" href="EdenTest_Extension_CustomIO_EventSetMulti.txt" format="ascii_v0" instances="2" >
            <Port id="zero"/>
            <Port id="one"/>
        </EdenEventSetReader>
        <!-- test indirect loopback with delayeur -->
        <EdenEventSetReader id="SpikeXD" href="file://spikeDelayed.to_sim.pipe" format="ascii_v0" instances="1" >
            <Port id="lilili"/>
        </EdenEventSetReader>

        <inputList id="inliX" component="inpX" population="popX">
            <inputW id="0" target="popX[0]" destination="synapses" weight="1"/>
        </inputList>

        <projection id="projX" presynapticPopulation="SpikeX" postsynapticPopulation="popX" synapse="syn0">
            <connection id="0" preCellId="0" postCellId="1"/>
        </projection>
        <projection id="projY" presynapticPopulation="SpikeY" postsynapticPopulation="popX" synapse="syn0">
            <connection id="0" preCellId="0" preSegmentId="zero" postCellId="1"/>
            <connection id="1" preCellId="0" preSegmentId="one"  postCellId="1"/>
            <connection id="2" preCellId="1" preSegmentId="zero" postCellId="1"/>
            <connection id="3" preCellId="1" preSegmentId="one"  postCellId="1"/>
        </projection>

        <inputList id="ingaD" component="gapX" population="pop0"><inputW id="0" target="pop0[2]" destination="synapses" weight="1"/></inputList>
        <inputList id="ingaX" component="gapX" population="popX"><inputW id="0" target="popX[2]" destination="synapses" weight="1"/></inputList>

        <projection id="projXD" presynapticPopulation="SpikeXD" postsynapticPopulation="popX" synapse="syn0"> <connection id="0" preCellId="0" postCellId="3"/> </projection>

    </network>

    <Simulation id="sim1" length="50.04ms" step="0.010ms" target="EdenTestNetwork">
        <EdenCustomSetup filename="./EdenTest_Extension_CustomIO_CustomSetup.txt"/>

		<OutputFile id="first" fileName="results.gen.txt">
			<OutputColumn id="v00" quantity="pop0[0]/v" />
			<OutputColumn id="v01" quantity="pop0[1]/v" />
			<OutputColumn id="v02" quantity="pop0[2]/v" />
			<OutputColumn id="v03" quantity="pop0[3]/v" />
			<OutputColumn id="vX0" quantity="popX[0]/v" />
            <OutputColumn id="vX1" quantity="popX[1]/v" />
            <OutputColumn id="vX2" quantity="popX[2]/v" />
            <OutputColumn id="vX3" quantity="popX[3]/v" />
		</OutputFile>

        <EdenOutputFile id="trajepipe" href="file://timeseriesDelayed.from_sim.pipe" format="ascii_v0" sampling_interval="0 ms" >
            <OutputColumn id="0" quantity="popCD[1]/v" output_units="V"/>
		</EdenOutputFile>
        <EdenEventOutputFile id="spikepipe" href="file://spikeDelayed.from_sim.pipe" format="ascii_v0" maximum_interval="10 ms" >
            <EventSelection id="0" select="popSX[0]/spike"/>
		</EdenEventOutputFile>

        <EdenEventOutputFile id="spikerec" href="file:///dev/stdout" format="ascii_v0" maximum_interval="5 ms" >
            <EventSelection id="0" select="popS0[0]" eventPort="spike"/>
            <EventSelection id="10" select="SpikeY[0]/zero"/>
            <EventSelection id="11" select="SpikeY[0]/one" />
            <EventSelection id="12" select="SpikeY[1]/zero"/>
            <EventSelection id="13" select="SpikeY[1]/one" />
		</EdenEventOutputFile>

        <!-- TODO test direct loopback -->
        <!-- TODO test correctness of starting_from, up_to_excluding, sampling_interval, maximum interval -->
        <!-- TODO test sampling points -->
        <!-- TODO clip to integral multiples of dt -->
        <!-- LATER log snapshots of state variables when spikes happen, like Brian can ... check what's easy to do in the Monitor class -->

    </Simulation>

    <!-- Specify which component to run -->
    <Target component="sim1"/>

</neuroml>
