<?xml version="1.0" encoding="UTF-8"?>

<neuroml xmlns="http://www.neuroml.org/schema/neuroml2"
         xmlns:xsi="http://www.w3.org/2001/XMLSchema-instance"
         xsi:schemaLocation="http://www.neuroml.org/schema/neuroml2 ../Schemas/NeuroML2/NeuroML_v2beta4.xsd"
         id=" NML_EdenTestNetwork1">

    <!-- Example of an isolated, passive compartment; minimal sanity check -->

	<ionChannelHH id="passiveChan" conductance="10pS">
		<notes>Leak conductance</notes>
	</ionChannelHH>

    <!-- until blocking plastic is supported
    <blockingPlasticSynapse id="NMDA" gbase=".8nS" tauRise="1e-3s" tauDecay="13.3333e-3s" erev="0V">

        <blockMechanism type="voltageConcDepBlockMechanism" species="mg"
                        blockConcentration="1.2mM" scalingConc="1.9205441817997078mM"
                        scalingVolt="0.016129032258064516V"/>

    </blockingPlasticSynapse>
	-->

	<cell id="PassiveCompartment">

        <morphology id="MultiCompCell_morphology">

            <segment id ="0" name="Soma">
                <proximal x="0" y="0" z="0" diameter="10"/>
                <distal x="10" y="0" z="0" diameter="10"/>
            </segment>

        </morphology>

        <biophysicalProperties id="bioPhys1">

            <membraneProperties>

                <channelDensity id="leak" ionChannel="passiveChan" condDensity="3.0 S_per_m2" erev="-0mV" ion="non_specific"/>
				<!-- <channelDensity id="naChans" ionChannel="naChan" condDensity="120.0 mS_per_cm2" erev="50.0 mV" ion="na"/>
                <channelDensity id="kChans" ionChannel="kChan" condDensity="360 S_per_m2" erev="-77mV" ion="k"/>
		 -->
                <!-- <spikeThresh value="-64.5mV"/> -->
                <specificCapacitance value="1.0 uF_per_cm2"/>

				<initMembPotential value="-65mV" />
				<!-- initMembPotential for specific segment group is broken in NeuroML ! jLEMS frontend strips the segmentGroup property away !
				<initMembPotential value="-65mV" segmentGroup = "soma_group"/>
                <initMembPotential value="-75mV" segmentGroup = "dendrite_group"/>
				-->

            </membraneProperties>

            <intracellularProperties>
                <resistivity value="1 kohm_cm"/>
            </intracellularProperties>

        </biophysicalProperties>
    </cell>
    <!--
    <pulseGenerator id="pulseGen2" delay="1ms" duration="20ms" amplitude="0.2nA"/>
    <pulseGenerator id="pulseGen3" delay="0.001ms" duration="0.020ms" amplitude="0.18nA"/>
	 -->
    <network id="EdenTest_PassiveCompartment">

        <population id="pop0" type="populationList" component="PassiveCompartment">
            <instance id="0">
                <location x="0" y="0" z="0"/>
            </instance>
        </population>
		<!--
		<electricalProjection id ="testGJconn" presynapticPopulation="pop0" postsynapticPopulation="pop0">
			<electricalConnection id="0" preCell="0" preSegment="0" postCell="2" postSegment="1" synapse="gj1"/>
		</electricalProjection>

		<projection id="projAexpo" presynapticPopulation="pop0" postsynapticPopulation="pop0" synapse="expone">
            		<connection id="0" preCellId="../pop0/2/MultiCompCell" postCellId="../pop0/1/MultiCompCell" preSegmentId="0" preFractionAlong="0.5" postSegmentId="1" postFractionAlong="0.5"/>
        </projection>
		 -->
        <!-- TODO
		<projection id="projAMPA" presynapticPopulation="pop0" postsynapticPopulation="pop0" synapse="AMPA">
            <connection id="0" preCellId="../pop0/0/MultiCompCell" postCellId="../pop0/1/MultiCompCell" preSegmentId="0" preFractionAlong="0.5" postSegmentId="0" postFractionAlong="0.5"/>
            <connection id="1" preCellId="../pop0/0/MultiCompCell" postCellId="../pop0/1/MultiCompCell" preSegmentId="1" preFractionAlong="0.5" postSegmentId="2" postFractionAlong="0.5"/>

            <connection id="2" preCellId="../pop0/2/MultiCompCell" postCellId="../pop0/1/MultiCompCell" preSegmentId="0" preFractionAlong="0.5" postSegmentId="0" postFractionAlong="0.5"/>
            <connection id="3" preCellId="../pop0/2/MultiCompCell" postCellId="../pop0/1/MultiCompCell" preSegmentId="1" preFractionAlong="0.5" postSegmentId="1" postFractionAlong="0.5"/>
            <connection id="4" preCellId="../pop0/2/MultiCompCell" postCellId="../pop0/1/MultiCompCell" preSegmentId="1" preFractionAlong="0.5" postSegmentId="2" postFractionAlong="0.5"/>
        </projection>
		-->

		<!-- until blocking plastic is supported
        <projection id="projNMDA" presynapticPopulation="pop0" postsynapticPopulation="pop0" synapse="NMDA">
            <connection id="0" preCellId="../pop0/0/MultiCompCell" postCellId="../pop0/1/MultiCompCell" preSegmentId="0" preFractionAlong="0.5" postSegmentId="0" postFractionAlong="0.5"/>
            <connection id="1" preCellId="../pop0/0/MultiCompCell" postCellId="../pop0/1/MultiCompCell" preSegmentId="1" preFractionAlong="0.5" postSegmentId="2" postFractionAlong="0.5"/>

            <connection id="2" preCellId="../pop0/2/MultiCompCell" postCellId="../pop0/1/MultiCompCell" preSegmentId="0" preFractionAlong="0.5" postSegmentId="0" postFractionAlong="0.5"/>
            <connection id="3" preCellId="../pop0/2/MultiCompCell" postCellId="../pop0/1/MultiCompCell" preSegmentId="1" preFractionAlong="0.5" postSegmentId="1" postFractionAlong="0.5"/>
            <connection id="4" preCellId="../pop0/2/MultiCompCell" postCellId="../pop0/1/MultiCompCell" preSegmentId="1" preFractionAlong="0.5" postSegmentId="2" postFractionAlong="0.5"/>
        </projection>
		-->
		<!--
        <inputList id="stimInput1" component="pulseGen2" population="pop0">
            <input id="0" target="../pop0/0/MultiCompCell" segmentId="0" fractionAlong="0.5" destination="synapses"/>
        </inputList>

        <inputList id="stimInput2" component="pulseGen3" population="pop0">
            <input id="1" target="../pop0/2/MultiCompCell" segmentId="0" fractionAlong="0.5" destination="synapses"/>
        </inputList> -->
		<!-- TODO spike inputs -->
    </network>

</neuroml>
