<Lems>

<!-- Specify which component to run -->
    <Target component="sim1"/>

<!-- Include core NeuroML2 ComponentType definitions -->
    <Include file="Cells.xml"/>
    <Include file="Networks.xml"/>
    <Include file="Simulation.xml"/>
    <Include file="PyNN.xml"/>

    <!-- Main NeuroML2 content. -->

    <!-- Including file with a <neuroml> root, a "real" NeuroML 2 file -->
    <Include file="EdenTest_CoreInputs.nml"/>

    <!-- End of NeuroML2 content -->

    <Simulation id="sim1" length="100.000ms" step="0.010ms" target="EdenTestNetwork">
		<OutputFile id="first" fileName="results.gen.txt">

			<OutputColumn id="v_input_demo01" quantity="InputDemos/01/PassiveCell/0/v" />
			<OutputColumn id="v_input_demo02" quantity="InputDemos/02/PassiveCell/0/v" />
      <!-- ramp and clamp inputs do not work in NeuroML/NEURON; TODO check a newer release -->
			<!-- <OutputColumn id="v_input_demo03" quantity="InputDemos/03/PassiveCell/0/v" /> TODO -->
			<!-- <OutputColumn id="v_input_demo04" quantity="InputDemos/04/PassiveCell/0/v" /> TODO -->
			<!-- <OutputColumn id="v_input_demo05" quantity="InputDemos/05/PassiveCell/0/v" /> TODO -->
			<OutputColumn id="v_input_demo06" quantity="InputDemos/06/PassiveCell/0/v" />
      <!-- NeuroML/NEURON hangs when poisson firing synapses are involved, TODO check a newer release -->
			<!-- <OutputColumn id="v_input_demo07" quantity="InputDemos/07/PassiveCell/0/v" /> TODO -->
			<!-- <OutputColumn id="v_input_demo08" quantity="InputDemos/08/PassiveCell/0/v" /> TODO -->
			<OutputColumn id="v_input_demo09" quantity="InputDemos/09/PassiveCell/0/v" />

			<OutputColumn id="v_input_demo11" quantity="InputDemos/11/PassiveCell/0/v" />
			<OutputColumn id="v_input_demo12" quantity="InputDemos/12/PassiveCell/0/v" />
			<!-- <OutputColumn id="v_input_demo13" quantity="InputDemos/13/PassiveCell/0/v" /> TODO -->
			<!-- <OutputColumn id="v_input_demo14" quantity="InputDemos/14/PassiveCell/0/v" /> TODO -->
			<!-- <OutputColumn id="v_input_demo15" quantity="InputDemos/15/PassiveCell/0/v" /> TODO -->
			<!-- <OutputColumn id="v_input_demo16" quantity="InputDemos/16/PassiveCell/0/v" /> TODO -->

      <!-- dimensionless izhikevichCell  does not work in NeuroML/NEURON; TODO check a newer release -->
      <!-- <OutputColumn id="v_input_demoDL01" quantity="InputDemosDL[01]/v" /> TODO -->
			<!-- <OutputColumn id="v_input_demoDL02" quantity="InputDemosDL[02]/v" /> TODO -->
			<!-- <OutputColumn id="v_input_demoDL03" quantity="InputDemosDL[03]/v" /> TODO -->

		</OutputFile>
		<EventOutputFile id="spikerec" fileName="resultspikes.gen.txt" format="TIME_ID">
            <EventSelection id="0" select="Input_spikeArray[0]" eventPort="spike"/>
            <EventSelection id="1" select="Input_spikeGenerator[0]" eventPort="spike"/>
		</EventOutputFile>
    </Simulation>

</Lems>
